# 1. Исходные данные
M := 0.455
b := 3.7*0.00767/0.00635
Bx := 0.05
m := 0.210
Bf := 0.02
a := 1
l := 0.3048
Ip := 0.02
Rm := 2.6
g := 9.81
L := 0.6096
# 2. Начальные условия
K := [0; 0; 0; 0]
x[0] := [0; 0; 1.127; 0]
# 3. Дифференцирование системы однородных ур-ний
F(t, x) := [
    x[1];
    (1/((m*l)^2*sin(x[2])*sin(x[2]) + m*M*l^2 + (M + m)*Ip))*((m*l^2 + Ip)*(b/Rm*(x[0]*K[0] + x[1]*K[1] + x[2]*K[2] + x[3]*K[3]) - b^2/Rm*x[1] - m*l*sin(x[2])*x[3]^2 - Bx*x[1] - a*sin(3*t)/50) + (m*l*cos(x[2]))*(m*g*l*sin(x[2])) - Bf*x[3] - a*cos(sin(5*t))/50);
    x[3];
    (1/((m*l)^2*sin(x[2])*sin(x[2]) + m*M*l^2 + (M + m)*Ip))*((m*l*cos(x[2]))*(b/Rm*(x[0]*K[0] + x[1]*K[1] + x[2]*K[2] + x[3]*K[3]) - b^2/Rm*x[1] - m*l*sin(x[2])*x[3]^2 - Bx*x[1] - a*sin(3*t)/50) + (M + m)*(m*g*l*sin(x[2])) - Bf*x[3] - a*cos(sin(5*t))/50)
]
Z := rkfixed(x[0], 0, 7, 700, F)
# 4. Построение таблицы значений
Z =  # no stored result
# 5. Построение траектории движения маяника на тележке
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